OpenVSP model (file version 5), 21 components.
Geometry view with OpenVSP parameter names; values to 6 digits, angles in degrees, lengths in the model's unit.
Overall bounding box: X_Min=0 X_Len=58.6884 Y_Min=-27.9609 Y_Len=55.9217 Z_Min=-6.172 Z_Len=17.8788

Fuselage "Fuselage"
  location (X Y Z) 0 0 0, rotation 0 0 0
  bounding box size 58 5.87 6.83199
  Design: Length=58
  cross sections:
    n  XLocPercent  YLocPercent  ZLocPercent  shape
    0  0            0            0            point
    1  0.15         0            0            circle Circle_Diameter=5.87
    2  0.761724     0            0            as above
    3  1            0            0.0506034    point

Wing "Wing"
  location (X Y Z) 16.9 0 -1.85, rotation 0 2.2 0
  symmetric about XZ
  bounding box size 23.2459 55.9217 4.20221
  totals: TotalSpan=56.1249 TotalProjectedSpan=55.9113 TotalChord=5.34522 TotalArea=300 TotalAR=10.4202 MAC=6.2424
  root: chord 9.13714, twist 0, airfoil file "SC(2)-0714 Supercritical airfoil (coordinates from Raymer w/ one correction)"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 BaseThickChord=0.139385 ThickChord=0.175
  sections:
    n  Span     Root_Chord  Tip_Chord  Area  Sweep  Sweep_Location  Dihedral  Twist  Twist_Location  tip airfoil
    1  28.0624  9.13714     1.55331    150   35.05  0.25            5         -1     0.25            airfoil file "SC(2)-0714 Supercritical airfoil (coordinates from Raymer w/ one correction)"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 BaseThickChord=0.139385 ThickChord=0.08

Conformal "FuelTank", child of "Wing"
  location (X Y Z) 16.9 0 -1.85, rotation 0 2.2 0; relative location 0 0 0, rotation 0 0 0
  symmetric about XZ
  bounding box size 18.8282 47.5017 3.56411
  Design: ChordTrimFlag=1 ChordTrimMax=0.86 ChordTrimMin=0.36 EtaTrimMax=0.85 EtaTrimMin=0 L01Max=1 L01Min=1 L0LenTrimMax=33.2501 L0LenTrimMin=0 LTrimMax=0.9999 LTrimMin=0 OffSetEnds=1 Offset=0.0290909 Side1Trim=0.1 Side1TrimFlag=0 Side2Trim=0.1 Side2TrimFlag=0 Side3Trim=0.1 Side3TrimFlag=0 Side4Trim=0.1 Side4TrimFlag=0 UMaxTrimTypeFalg=0 UMinTrimTypeFalg=0 UTrimFlag=1 UTrimMax=0.85 UTrimMin=0 V1TrimBegin=0.821741 V1TrimEnd=0.178259 V1TrimFlag=1 V2TrimBegin=0.421119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

Conformal "Aileron", child of "Wing"
  location (X Y Z) 16.9 0 -1.85, rotation 0 2.2 0; relative location 0 0 0, rotation 0 0 0
  symmetric about XZ
  bounding box size 4.15468 54.2904 0.899702
  Design: ChordTrimFlag=1 ChordTrimMax=0.3 ChordTrimMin=0 EtaTrimMax=0.970903 EtaTrimMin=0.75 L01Max=1 L01Min=1 L0LenTrimMax=33.2501 L0LenTrimMin=33.2501 LTrimMax=0.9999 LTrimMin=0.9999 OffSetEnds=1 Offset=0 Side1Trim=0.1 Side1TrimFlag=0 Side2Trim=0.1 Side2TrimFlag=0 Side3Trim=0.1 Side3TrimFlag=0 Side4Trim=0.1 Side4TrimFlag=0 UMaxTrimTypeFalg=0 UMinTrimTypeFalg=0 UTrimFlag=1 UTrimMax=0.970903 UTrimMin=0.75 V1TrimBegin=1 V1TrimEnd=0 V1TrimFlag=1 V2TrimBegin=0.14861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

Conformal "Flaps", child of "Wing"
  location (X Y Z) 16.9 0 -1.85, rotation 0 2.2 0; relative location 0 0 0, rotation 0 0 0
  symmetric about XZ
  bounding box size 11.6488 41.0783 2.50142
  Design: ChordTrimFlag=1 ChordTrimMax=0.33 ChordTrimMin=0 EtaTrimMax=0.7346 EtaTrimMin=0.1046 L01Max=1 L01Min=1 L0LenTrimMax=33.2501 L0LenTrimMin=0 LTrimMax=0.9999 LTrimMin=0 OffSetEnds=1 Offset=0 Side1Trim=0.1 Side1TrimFlag=0 Side2Trim=0.1 Side2TrimFlag=0 Side3Trim=0.1 Side3TrimFlag=0 Side4Trim=0.1 Side4TrimFlag=0 UMaxTrimTypeFalg=0 UMinTrimTypeFalg=0 UTrimFlag=1 UTrimMax=0.7346 UTrimMin=0.1046 V1TrimBegin=1 V1TrimEnd=0 V1TrimFlag=1 V2TrimBegin=0.163463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

Wing "HT"
  location (X Y Z) 49.2841 0 1.935, rotation 0 0 0
  symmetric about XZ
  bounding box size 9.40434 15.3484 1.14522
  totals: TotalSpan=15.433 TotalProjectedSpan=15.3484 TotalChord=3.85824 TotalArea=59.544 TotalAR=3.9563 MAC=4.15676
  root: chord 5.71591, twist 0, airfoil file "SC(2)-0714 Supercritical airfoil (coordinates from Raymer w/ one correction)"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 BaseThickChord=0.139385 ThickChord=0.09
  sections:
    n  Span     Root_Chord  Tip_Chord  Area    Sweep  Sweep_Location  Dihedral  Twist  Twist_Location  tip airfoil
    1  7.71648  5.71591     2.00057    29.772  40     0.25            6         0      0.25            airfoil file "SC(2)-0714 Supercritical airfoil (coordinates from Raymer w/ one correction)"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 BaseThickChord=0.139385 ThickChord=0.08

Conformal "Elevator", child of "HT"
  location (X Y Z) 49.2841 0 1.935, rotation 0 0 0; relative location 0 0 0, rotation 0 0 0
  symmetric about XZ
  bounding box size 4.63191 15.3469 0.938728
  Design: ChordTrimFlag=1 ChordTrimMax=0.3 ChordTrimMin=0 EtaTrimMax=0.9999 EtaTrimMin=0.161274 L01Max=1 L01Min=1 L0LenTrimMax=9.51642 L0LenTrimMin=0 LTrimMax=0.9999 LTrimMin=0 OffSetEnds=1 Offset=0 Side1Trim=0.1 Side1TrimFlag=0 Side2Trim=0.1 Side2TrimFlag=0 Side3Trim=0.1 Side3TrimFlag=0 Side4Trim=0.1 Side4TrimFlag=0 UMaxTrimTypeFalg=0 UMinTrimTypeFalg=0 UTrimFlag=1 UTrimMax=0.9999 UTrimMin=0.161274 V1TrimBegin=1 V1TrimEnd=0 V1TrimFlag=1 V2TrimBegin=0.14861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

Wing "VT"
  location (X Y Z) 45.8365 0 2.935, rotation 90 0 0
  bounding box size 12.3383 0.823678 8.77181
  totals: TotalSpan=8.77181 TotalProjectedSpan=8.77181 TotalChord=5.84787 TotalArea=51.2964 TotalAR=1.5 MAC=6.30033
  root: chord 8.66351, twist 0, airfoil file "SC(2)-0714 Supercritical airfoil (coordinates from Raymer w/ one correction)"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 BaseThickChord=0.139385 ThickChord=0.095
  sections:
    n  Span     Root_Chord  Tip_Chord  Area     Sweep  Sweep_Location  Dihedral  Twist  Twist_Location  tip airfoil
    1  8.77181  8.66351     3.03223    51.2964  42     0.25            0         0      0.25            airfoil file "SC(2)-0714 Supercritical airfoil (coordinates from Raymer w/ one correction)"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 BaseThickChord=0.139385 ThickChord=0.08

Conformal "Rudder", child of "VT"
  location (X Y Z) 45.8365 0 2.935, rotation 90 0 0; relative location 0 0 0, rotation 0 0 0
  bounding box size 5.89214 0.669298 8.26165
  Design: ChordTrimFlag=1 ChordTrimMax=0.290909 ChordTrimMin=0 EtaTrimMax=0.9999 EtaTrimMin=0.0580587 L01Max=1 L01Min=1 L0LenTrimMax=10.9341 L0LenTrimMin=0 LTrimMax=0.9999 LTrimMin=0 OffSetEnds=1 Offset=0 Side1Trim=0.1 Side1TrimFlag=0 Side2Trim=0.1 Side2TrimFlag=0 Side3Trim=0.1 Side3TrimFlag=0 Side4Trim=0.1 Side4TrimFlag=0 UMaxTrimTypeFalg=0 UMinTrimTypeFalg=0 UTrimFlag=1 UTrimMax=0.9999 UTrimMin=0.0580587 V1TrimBegin=1 V1TrimEnd=0 V1TrimFlag=1 V2TrimBegin=0.144096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

Custom "Turbofan"
  location (X Y Z) 22.1 10.5 -3.075, rotation 0 0 0
  bounding box size 5.8 3.50056 3.54825
  Design: Camber=0 CamberLoc=0.2 Chord=5.8 Height=3.036 InvertFlag=0 Shape=0 ThickChord=0.08 Width=3.036
  custom script Duct0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

Wing "Turbofan_pylon", child of "Turbofan"
  location (X Y Z) 22.3 10.5 -3.185, rotation 90 0 0; relative location 0.2 0 -0.11, rotation 90 0 0
  bounding box size 6.48445 0.576224 1.53
  totals: TotalSpan=1.53 TotalProjectedSpan=1.53 TotalChord=2.88 TotalArea=4.4064 TotalAR=0.53125 MAC=2.88
  root: chord 2.88, twist 0, NACA 4-series Camber=0 CamberLoc=0.2 ThickChord=0.2
  sections:
    n  Span  Root_Chord  Tip_Chord  Area    Sweep  Sweep_Location  Dihedral  Twist  Twist_Location  tip airfoil
    1  1.53  2.88        2.88       4.4064  67     0               0         0      0.25            as above

Fuselage "Spinners", child of "Turbofan"
  location (X Y Z) 21.2304 10.5 -3.075, rotation 0 0 0; relative location -0.869565 0 0, rotation 0 0 0
  symmetric about XZ
  bounding box size 0.54 0.63 0.63
  Design: Length=0.54
  cross sections:
    n  XLocPercent  YLocPercent  ZLocPercent  shape
    0  0            0            0            point
    1  0.51087      0            0            circle Circle_Diameter=0.63
    2  1            0            0            as above
    3  1            0            0            point

Wing "Fan_blade", child of "Turbofan"
  location (X Y Z) 21.41 10.5 -2.975, rotation 90 -20 0; relative location -0.69 0 0.1, rotation 90 -20 0
  15 copies around X
  bounding box size 0.507857 2.50731 2.51059
  totals: TotalSpan=2.232 TotalProjectedSpan=2.232 TotalChord=0.36 TotalArea=0.80352 TotalAR=6.2 MAC=0.380973
  root: chord 0.18, twist 0, NACA 4-series Camber=0 CamberLoc=0.2 ThickChord=0.1
  sections:
    n  Span   Root_Chord  Tip_Chord  Area     Sweep     Sweep_Location  Dihedral  Twist  Twist_Location  tip airfoil
    1  1.116  0.18        0.54       0.40176  -8.16667  0               0         -40    0.25            NACA 4-series Camber=0 CamberLoc=0.2 ThickChord=0.0416667

Fuselage "Nozzle", child of "Turbofan"
  location (X Y Z) 21.5565 10.5 -3.075, rotation 0 0 0; relative location -0.543478 0 0, rotation 0 0 0
  bounding box size 5.13 2.16 2.16
  Design: Length=5.13
  cross sections:
    n  XLocPercent  YLocPercent  ZLocPercent  shape
    0  0            0            0            circle Circle_Diameter=1.8
    1  0.538043     0            0            circle Circle_Diameter=2.16
    2  1            0            0            point

Ellipsoid "Nose_Wheel"
  location (X Y Z) 5.413 0 -5.585, rotation 0 0 0
  bounding box size 1.174 0.2935 1.174
  Design: A_Radius=0.587 B_Radius=0.14675 C_Radius=0.587

Ellipsoid "Main_Wheels"
  location (X Y Z) 27.5335 5.5 -5.585, rotation 0 0 0
  symmetric about XZ
  bounding box size 1.174 11.294 1.174
  Design: A_Radius=0.587 B_Radius=0.147 C_Radius=0.587

Custom "Turbofan"
  location (X Y Z) 22.1 -10.5 -3.075, rotation 0 0 0
  bounding box size 5.8 3.50056 3.54825
  Design: Camber=0 CamberLoc=0.2 Chord=5.8 Height=3.036 InvertFlag=0 Shape=0 ThickChord=0.08 Width=3.036
  custom script Duct0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

Wing "Turbofan_pylon", child of "Turbofan"
  location (X Y Z) 22.3 -10.5 -3.185, rotation 90 0 0; relative location 0.2 0 -0.11, rotation 90 0 0
  bounding box size 6.48445 0.576224 1.53
  totals: TotalSpan=1.53 TotalProjectedSpan=1.53 TotalChord=2.88 TotalArea=4.4064 TotalAR=0.53125 MAC=2.88
  root: chord 2.88, twist 0, NACA 4-series Camber=0 CamberLoc=0.2 ThickChord=0.2
  sections:
    n  Span  Root_Chord  Tip_Chord  Area    Sweep  Sweep_Location  Dihedral  Twist  Twist_Location  tip airfoil
    1  1.53  2.88        2.88       4.4064  67     0               0         0      0.25            as above

Fuselage "Spinners", child of "Turbofan"
  location (X Y Z) 21.2304 -10.5 -3.075, rotation 0 0 0; relative location -0.869565 0 0, rotation 0 0 0
  symmetric about XZ
  bounding box size 0.54 0.63 0.63
  Design: Length=0.54
  cross sections:
    n  XLocPercent  YLocPercent  ZLocPercent  shape
    0  0            0            0            point
    1  0.51087      0            0            circle Circle_Diameter=0.63
    2  1            0            0            as above
    3  1            0            0            point

Wing "Fan_blade", child of "Turbofan"
  location (X Y Z) 21.41 -10.5 -2.975, rotation 90 -20 0; relative location -0.69 0 0.1, rotation 90 -20 0
  15 copies around X
  bounding box size 0.507857 2.50731 2.51059
  totals: TotalSpan=2.232 TotalProjectedSpan=2.232 TotalChord=0.36 TotalArea=0.80352 TotalAR=6.2 MAC=0.380973
  root: chord 0.18, twist 0, NACA 4-series Camber=0 CamberLoc=0.2 ThickChord=0.1
  sections:
    n  Span   Root_Chord  Tip_Chord  Area     Sweep     Sweep_Location  Dihedral  Twist  Twist_Location  tip airfoil
    1  1.116  0.18        0.54       0.40176  -8.16667  0               0         -40    0.25            NACA 4-series Camber=0 CamberLoc=0.2 ThickChord=0.0416667

Fuselage "Nozzle", child of "Turbofan"
  location (X Y Z) 21.5565 -10.5 -3.075, rotation 0 0 0; relative location -0.543478 0 0, rotation 0 0 0
  bounding box size 5.13 2.16 2.16
  Design: Length=5.13
  cross sections:
    n  XLocPercent  YLocPercent  ZLocPercent  shape
    0  0            0            0            circle Circle_Diameter=1.8
    1  0.538043     0            0            circle Circle_Diameter=2.16
    2  1            0            0            point
